OpenVSP model (file version 4), 1 components.
Geometry view with OpenVSP parameter names; values to 6 digits, angles in degrees, lengths in the model's unit.
Overall bounding box: X_Min=-0.119378 X_Len=0.449378 Y_Min=-3.6984 Y_Len=9.9984 Z_Min=-5.27105 Z_Len=11.0436

Wing "WingGeom"
  location (X Y Z) 0 1 0, rotation 0 60 0
  3 copies around X
  bounding box size 0.449378 9.9984 11.0436
  totals: TotalSpan=10.6 TotalProjectedSpan=10.6 TotalChord=0.54289 TotalArea=4.99427
  root: chord 0.587559, twist 0, NACA 4-series Camber=0 CamberLoc=0.2 ThickChord=0.606995
  sections:
    n  Span  Root_Chord  Tip_Chord  Area      Sweep  Sweep_Location  Dihedral  Twist  Twist_Location  tip airfoil
    1  0.3   0.587559    0.66       0.187134  0      0               0         0      0.25            NACA 4-series Camber=0 CamberLoc=0.2 ThickChord=0.3
    2  5     0.66        0.264      2.31      5      0               0         25     0.25            NACA 4-series Camber=0 CamberLoc=0.2 ThickChord=0.1
